baud := 115200*2
x := 40000000/(4*baud) - 1
x = 42.4028
xr := round(x)
xr = 42
realBaud := 40000000/(4*(xr + 1))
realBaud = 232558
error := (realBaud - baud)/baud*100
error = 0.936693
1/(4*10^-6) = 250000
